*Heading
** Job name: Lbracket_3D_Size_1_0 Model name: Lbracket_3D_1_0
** Generated by: Abaqus/CAE 2022
*Preprint, echo=NO, model=NO, history=NO, contact=NO
**
** PARTS
**
*Part, name=PART-1
*Node
      1,           0.,           0.,           0.
      2,           0.,           0.,           1.
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*Element, type=C3D8
    1, 19441, 19442, 18241, 19440, 18240, 18239, 18238, 18237
    2, 18240, 18239, 18238, 18237, 18236, 18235, 18234, 18233
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*Elset, elset=_PickedSet2, internal, generate
     1,  16875,      1
** Section: Section-1
*Solid Section, elset=_PickedSet2, material=Material-1
,
*End Part
**
**
** ASSEMBLY
**
*Assembly, name=Assembly
**
*Instance, name=PART-1-1, part=PART-1
*End Instance
**
*Nset, nset=Right, instance=PART-1-1
 17926, 17928, 17930, 17932, 17934, 17936
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*Nset, nset=TOP, instance=PART-1-1
 13756, 13758, 13760, 13762, 13764, 13766
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*End Assembly
**
** MATERIALS
**
*Material, name=Material-1
*Elastic
106000., 0.31
** ----------------------------------------------------------------
**
** STEP: Step-1
**
*Step, name=Step-1, nlgeom=NO
*Static
1., 1., 1e-05, 1.
**
** BOUNDARY CONDITIONS
**
** Name: BC-1 Type: Symmetry/Antisymmetry/Encastre
*Boundary
TOP, ENCASTRE
**
** LOADS
**
** Name: Load-1   Type: Concentrated force
*Cload
Right, 2, -20.
**
** OUTPUT REQUESTS
**
*Restart, write, frequency=0
**
** FIELD OUTPUT: F-Output-1
**
*Output, field, variable=PRESELECT
**
** HISTORY OUTPUT: H-Output-1
**
*Output, history, variable=PRESELECT
*End Step
