*Heading
** Job name: AlcoaBracket_Size_4_0 Model name: AlcoaBracket_Size_4_0
** Generated by: Abaqus/CAE 2022
*Preprint, echo=NO, model=NO, history=NO, contact=NO
**
** PARTS
**
*Part, name=PART-1
*Node
      1,           0.,           0.,   4.95300007
      2,           0.,           0.,   14.0970001
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*Element, type=C3D4
    1, 2278, 2279, 2280, 2281
    2, 2278, 2282, 2283, 2284
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*Nset, nset=_PickedSet6, internal, generate
    1,  4533,     1
*Elset, elset=_PickedSet6, internal, generate
     1,  20224,      1
** Section: Section-1
*Solid Section, elset=_PickedSet6, material=Material-1
,
*End Part
**
**
** ASSEMBLY
**
*Assembly, name=Assembly
**
*Instance, name=PART-1-1, part=PART-1
*End Instance
**
*Elset, elset=NonDesign, instance=PART-1-1
    32,    36,    38,    93,   116,   146
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*End Assembly
**
** MATERIALS
**
*Material, name=Material-1
*Elastic
200000., 0.27
