*Heading
** Job name: Vframe_3D_Size_1_5 Model name: Vframe_3D_Size_1_5
** Generated by: Abaqus/CAE 2022
*Preprint, echo=NO, model=NO, history=NO, contact=NO
**
** PARTS
**
*Part, name=PART-1
*Node
      1,   76.8557434,   27.7787514,           0.
      2,   76.8557434,   27.7787514,   1.53846157
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*Element, type=C3D8
    1,  2446, 10805,  3879,   704,  2445, 10804,  3876,   703
    2,  2447, 10806,  3882,   705,  2446, 10805,  3879,   704
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*End Part
**
**
** ASSEMBLY
**
*Assembly, name=Assembly
**
*Instance, name=PART-1-1, part=PART-1
*End Instance
**
*End Assembly
**
** MATERIALS
**
*Material, name=Material-1
*Elastic
106000., 0.31
** ----------------------------------------------------------------
**
** STEP: Step-1
**
*Step, name=Step-1, nlgeom=NO
*Static
1., 1., 1e-05, 1.
**
** OUTPUT REQUESTS
**
*Restart, write, frequency=0
**
** FIELD OUTPUT: F-Output-1
**
*Output, field, variable=PRESELECT
**
** HISTORY OUTPUT: H-Output-1
**
*Output, history, variable=PRESELECT
*End Step
